! ANSYS MAPDL verification model generated by project2_truss.py
! Consistent units: mm, N, MPa. Python node n is MAPDL node n+1.
/CLEAR
/PREP7
ET,1,LINK180
MP,EX,1,200000
MP,PRXY,1,0.3
TYPE,1
MAT,1
N,1,0,0,0
N,2,0,1000,0
N,3,1000,0,0
N,4,1000,1000,0
N,5,2000,0,0
N,6,2000,1000,0
N,7,3000,0,0
N,8,3000,1000,0
N,9,4000,0,0
N,10,4000,1000,0
N,11,5000,0,0
N,12,5000,1000,0
N,13,6000,0,0
N,14,6000,1000,0
D,1,UZ,0
D,2,UZ,0
D,3,UZ,0
D,4,UZ,0
D,5,UZ,0
D,6,UZ,0
D,7,UZ,0
D,8,UZ,0
D,9,UZ,0
D,10,UZ,0
D,11,UZ,0
D,12,UZ,0
D,13,UZ,0
D,14,UZ,0
SECTYPE,1,LINK,,MEMBER_1
SECDATA,50
SECNUM,1
E,1,3
SECTYPE,2,LINK,,MEMBER_2
SECDATA,50
SECNUM,2
E,3,5
SECTYPE,3,LINK,,MEMBER_3
SECDATA,50
SECNUM,3
E,5,7
SECTYPE,4,LINK,,MEMBER_4
SECDATA,50
SECNUM,4
E,7,9
SECTYPE,5,LINK,,MEMBER_5
SECDATA,50
SECNUM,5
E,9,11
SECTYPE,6,LINK,,MEMBER_6
SECDATA,50
SECNUM,6
E,11,13
SECTYPE,7,LINK,,MEMBER_7
SECDATA,50
SECNUM,7
E,2,4
SECTYPE,8,LINK,,MEMBER_8
SECDATA,50
SECNUM,8
E,4,6
SECTYPE,9,LINK,,MEMBER_9
SECDATA,50
SECNUM,9
E,6,8
SECTYPE,10,LINK,,MEMBER_10
SECDATA,50
SECNUM,10
E,8,10
SECTYPE,11,LINK,,MEMBER_11
SECDATA,50
SECNUM,11
E,10,12
SECTYPE,12,LINK,,MEMBER_12
SECDATA,50
SECNUM,12
E,12,14
SECTYPE,13,LINK,,MEMBER_13
SECDATA,0.007071067811865475
SECNUM,13
E,1,4
SECTYPE,14,LINK,,MEMBER_14
SECDATA,0.007071067811865475
SECNUM,14
E,4,5
SECTYPE,15,LINK,,MEMBER_15
SECDATA,0.007071067811865475
SECNUM,15
E,5,8
SECTYPE,16,LINK,,MEMBER_16
SECDATA,0.007071067811865475
SECNUM,16
E,8,9
SECTYPE,17,LINK,,MEMBER_17
SECDATA,0.007071067811865475
SECNUM,17
E,9,12
SECTYPE,18,LINK,,MEMBER_18
SECDATA,0.007071067811865475
SECNUM,18
E,12,13
SECTYPE,19,LINK,,MEMBER_19
SECDATA,50
SECNUM,19
E,1,2
SECTYPE,20,LINK,,MEMBER_20
SECDATA,50
SECNUM,20
E,3,4
SECTYPE,21,LINK,,MEMBER_21
SECDATA,50
SECNUM,21
E,5,6
SECTYPE,22,LINK,,MEMBER_22
SECDATA,50
SECNUM,22
E,7,8
SECTYPE,23,LINK,,MEMBER_23
SECDATA,50
SECNUM,23
E,9,10
SECTYPE,24,LINK,,MEMBER_24
SECDATA,50
SECNUM,24
E,11,12
SECTYPE,25,LINK,,MEMBER_25
SECDATA,50
SECNUM,25
E,13,14
D,1,UX,0
D,1,UY,0
D,2,UX,0
D,2,UY,0
F,13,FY,-0.5
F,14,FY,-0.5
ALLSEL,ALL
FINISH
/SOLU
ANTYPE,STATIC
SOLVE
FINISH
/POST1
SET,LAST
ALLSEL,ALL
/OUTPUT,ansys_nodal_displacements,txt
PRNSOL,U,COMP
/OUTPUT
/OUTPUT,ansys_reactions,txt
PRRSOL
/OUTPUT
PLDISP,2
FINISH
